// COMSOL Multiphysics 6.0.0.318 model "example.mph"
// Outline of the model tree

Parameters
  a = 1[m]
  ll = 1.3*a/sqrt(3)
  ls = 0.7*a/sqrt(3)
  kx = pi/a/2
  ky = 0

Geometry
  geom1 "几何 1" (2D, length unit m)
    pol1: Polygon "多边形 1"
      source = table
      table = 
        {-a/4, -3*a/sqrt(3)/4}
        {-a/4+a, -3*a/sqrt(3)/4}
        {-a/4+a-a/2, -3*a/sqrt(3)/4+a*sqrt(3)/2}
        {-a/4-a/2, -3*a/sqrt(3)/4+a*sqrt(3)/2}
    pol2: Polygon "多边形 2"
      source = table
      table = 
        {-a/4, -3*a/sqrt(3)/4+a/sqrt(3)-ls/sqrt(3)}
        {-a/4+ls/2, -3*a/sqrt(3)/4+a/sqrt(3)+ls/sqrt(3)/2}
        {-a/4-ls/2, -3*a/sqrt(3)/4+a/sqrt(3)+ls/sqrt(3)/2}
    pol3: Polygon "多边形 3"
      source = table
      table = 
        {-a/4+a-a/2, -3*a/sqrt(3)/4+a*sqrt(3)/2-a/sqrt(3)+ls/sqrt(3)}
        {-a/4+a-a/2+ls/2, -3*a/sqrt(3)/4+a*sqrt(3)/2-a/sqrt(3)-ls/sqrt(3)/2}
        {-a/4+a-a/2-ls/2, -3*a/sqrt(3)/4+a*sqrt(3)/2-a/sqrt(3)-ls/sqrt(3)/2}
    pol4: Polygon "多边形 4"
      source = table
      table = 
        {-a/4, -3*a/sqrt(3)/4}
        {-a/4+a, -3*a/sqrt(3)/4}
        {-a/4+a-a/2, -3*a/sqrt(3)/4+a*sqrt(3)/2}
        {-a/4-a/2, -3*a/sqrt(3)/4+a*sqrt(3)/2}
    pol5: Polygon "多边形 5"
      source = table
      table = 
        {-a/4, -3*a/sqrt(3)/4+a/sqrt(3)-ls/sqrt(3)}
        {-a/4+ls/2, -3*a/sqrt(3)/4+a/sqrt(3)+ls/sqrt(3)/2}
        {-a/4-ls/2, -3*a/sqrt(3)/4+a/sqrt(3)+ls/sqrt(3)/2}
    pol6: Polygon "多边形 6"
      source = table
      table = 
        {-a/4+a-a/2, -3*a/sqrt(3)/4+a*sqrt(3)/2-a/sqrt(3)+ll/sqrt(3)}
        {-a/4+a-a/2+ll/2, -3*a/sqrt(3)/4+a*sqrt(3)/2-a/sqrt(3)-ll/sqrt(3)/2}
        {-a/4+a-a/2-ll/2, -3*a/sqrt(3)/4+a*sqrt(3)/2-a/sqrt(3)-ll/sqrt(3)/2}
    mov1: Move "移动 1" | input = pol4, pol5, pol6; displx = -a/2; disply = a/2*sqrt(3)
    pol7: Polygon "多边形 7"
      source = table
      table = 
        {-a/4, -3*a/sqrt(3)/4}
        {-a/4+a, -3*a/sqrt(3)/4}
        {-a/4+a-a/2, -3*a/sqrt(3)/4+a*sqrt(3)/2}
        {-a/4-a/2, -3*a/sqrt(3)/4+a*sqrt(3)/2}
    pol8: Polygon "多边形 8"
      source = table
      table = 
        {-a/4, -3*a/sqrt(3)/4+a/sqrt(3)-ll/sqrt(3)}
        {-a/4+ll/2, -3*a/sqrt(3)/4+a/sqrt(3)+ll/sqrt(3)/2}
        {-a/4-ll/2, -3*a/sqrt(3)/4+a/sqrt(3)+ll/sqrt(3)/2}
    pol9: Polygon "多边形 9"
      source = table
      table = 
        {-a/4+a-a/2, -3*a/sqrt(3)/4+a*sqrt(3)/2-a/sqrt(3)+ls/sqrt(3)}
        {-a/4+a-a/2+ls/2, -3*a/sqrt(3)/4+a*sqrt(3)/2-a/sqrt(3)-ls/sqrt(3)/2}
        {-a/4+a-a/2-ls/2, -3*a/sqrt(3)/4+a*sqrt(3)/2-a/sqrt(3)-ls/sqrt(3)/2}
    mov2: Move "移动 2" | input = pol7, pol8, pol9; displx = a/2; disply = -a/2*sqrt(3)
    arr1: Array "阵列 1" | input = mov1; size = 2; type = linear; linearsize = 2; displ = {-a/2, a/2*sqrt(3)}
    arr2: Array "阵列 2" | input = mov2; size = 2; type = linear; linearsize = 2; displ = {a/2, -a/2*sqrt(3)}
    fin: Finalize "形成联合体"

Physics
  emw: ElectromagneticWaves "电磁波，频域" on all domains
    dependent variable E = {Ex, Ey, Ez}
    ShapeProperty.order_electricfield = 1
    components.components = outofplane
    wee1: WaveEquationElectric "波动方程，电 1" (default)
      epsilonr_mat = userdef
      epsilonr = 1
      mur_mat = userdef
      mur = 11.56
      sigma_mat = userdef
      sigma = 0
    pec1: PerfectElectricConductor "理想电导体 1" (default)
    init1: init "初始值 1" (default)
    wee2: WaveEquationElectric "波动方程，电 2" on domains 2, 4, 5, 7, 8, 10, 11, 13-15
      epsilonr_mat = userdef
      epsilonr = 1
      mur_mat = userdef
      mur = 1
      sigma_mat = userdef
      sigma = 0
    pmc1: PerfectMagneticConductor "理想磁导体 1" on boundaries 2, 39
    pc1: PeriodicCondition "周期性条件 1" on boundaries 1, 5, 12, 16, 21, 25, 30, 34, 42, 46
      PeriodicType = Floquet
      kFloquet = {kx, ky, 0}
      destinationDomains: boundaries 16, 25, 34, 42, 46

Mesh
  mesh1 "网格 1"
    size: MeshSizeDefault "大小" | hmin = 0.03; custom = on; hmax = 1
    edg1: Edge "边 1" on boundaries 1, 5, 12, 21, 30
      size1: Size "大小 1" on boundaries 1, 5, 12, 21, 30 | hmax = 0.09; hmin = 0.01; hgrad = 1; custom = on
    cpe1: CopyEdge "复制边 1" | source = boundaries 1, 5, 12, 21, 30; destination = boundaries 16, 25, 34, 42, 46
    edg2: Edge "边 2" on boundaries 39
      size1: Size "大小 1" on boundaries 39 | hmax = 0.09; hmin = 0.01; hgrad = 1; custom = on
    cpe2: CopyEdge "复制边 2" | source = boundaries 39; destination = boundaries 2, 6, 13, 22, 31
    ftri1: FreeTri "自由三角形网格 1" on domains 6, 8, 11
    ftri2: FreeTri "自由三角形网格 2" on domains 3, 5, 7
    copy1: Copy "副本 1" | source = domains 3, 5, 7; destination = domains 1, 2, 4
    ftri3: FreeTri "自由三角形网格 3" on domains 9, 10, 14
    copy2: Copy "副本 2" | source = domains 9, 10, 14; destination = domains 12, 13, 15

Studies
  std1 "研究 1"
    eig: Eigenfrequency "特征频率" | eigmethod = region; eigunit = Hz; shift = 1[GHz]; eiglr = 0.3*3*10^8

Solver configurations
  sol1 "解 1" (study std1)
    v1: Variables "因变量 1"
    e1: Eigenvalue "特征值求解器 1" | transform = eigenfrequency; eigmethod = region; eiglr = 0.3*3*10^8
      d1: Direct "建议的直接求解器 (emw)" | linsolver = pardiso

Datasets
  dset1: Solution | solution = sol1

Plots
  pg1: PlotGroup2D "电场 (emw)" | data = dset1
    surf1: Surface "表面" | expr = emw.normE