// COMSOL Multiphysics 6.0.0.318 model "example.mph"
// Outline of the model tree

Parameters
  a = 1[m]
  kx = pi/a/2
  ky = 0

Geometry
  geom1 "几何 1" (2D, length unit m)
    pol1: Polygon "多边形 1"
      source = table
      table = 
        {-a/4, -3*a/sqrt(3)/4}
        {-a/4+a, -3*a/sqrt(3)/4}
        {-a/4+a-a/2, -3*a/sqrt(3)/4+a*sqrt(3)/2}
        {-a/4-a/2, -3*a/sqrt(3)/4+a*sqrt(3)/2}
    c1: Circle "圆 1" | pos = {-a/4, -3*a/sqrt(3)/4+a/sqrt(3)}; r = 0.2*a
    c2: Circle "圆 2" | pos = {-a/4+a-a/2, -3*a/sqrt(3)/4+a*sqrt(3)/2-a/sqrt(3)}; r = 0.2*a
    arr1: Array "阵列 1" | input = c1, c2, pol1; size = 2; type = linear; linearsize = 2; displ = {-a/2, +a/2*sqrt(3)}
    arr2: Array "阵列 2" | input = arr1(1,3); size = 3; type = linear; linearsize = 3; displ = {a/2, -a/2*sqrt(3)}
    fin: Finalize "形成联合体"

Physics
  emw: ElectromagneticWaves "电磁波，频域" on all domains
    dependent variable E = {Ex, Ey, Ez}
    ShapeProperty.order_electricfield = 1
    components.components = outofplane
    wee1: WaveEquationElectric "波动方程，电 1" (default)
      epsilonr_mat = userdef
      epsilonr = 15.26
      mur_mat = userdef
      mur = {0.7997, 0.7154i, 0, -0.7154i, 0.7997, 0, 0, 0, 1}
      sigma_mat = userdef
      sigma = 0
    pec1: PerfectElectricConductor "理想电导体 1" (default)
    init1: init "初始值 1" (default)
    wee2: WaveEquationElectric "波动方程，电 2" on domains 1-4
      epsilonr_mat = userdef
      epsilonr = 1
      mur_mat = userdef
      mur = 1
      sigma_mat = userdef
      sigma = 0
    pc1: PeriodicCondition "周期性条件 1" on boundaries 1, 3, 5, 7, 8, 10, 12, 13
      PeriodicType = Floquet
      kFloquet = {kx, ky, 0}
      destinationDomains: boundaries 7, 10, 12, 13

Mesh
  mesh1 "网格 1"
    size: MeshSizeDefault "大小" | hmax = 0.232; hmin = 0.00104; hcurve = 0.3; hgrad = 1.3
    edg1: Edge "边 1" on boundaries 1, 3, 5, 8
      size1: Size "大小 1" on boundaries 1, 3, 5, 8 | hauto = 4
    cpe1: CopyEdge "复制边 1" | source = boundaries 1, 3, 5, 8; destination = boundaries 7, 10, 12, 13
    edg2: Edge "边 2" on boundaries 2
      size1: Size "大小 1" on boundaries 2 | hauto = 4
    cpe2: CopyEdge "复制边 2" | source = boundaries 2; destination = boundaries 4, 6, 9, 11
    ftri1: FreeTri "自由三角形网格 1" on domains 2, 6, 8
      size1: Size "大小 1" on domains 2, 6, 8 | hauto = 7
    copy1: Copy "副本 1" | source = domains 2, 6, 8; destination = domains 1, 5, 7
    map1: Map "映射 1" on domains 3
    copy2: Copy "副本 2" | source = domains 3; destination = domains 4

Studies
  std1 "研究 1"
    eig: Eigenfrequency "特征频率" | shift = 1[GHz]

Solver configurations
  sol1 "解 1" (study std1)
    v1: Variables "因变量 1"
    e1: Eigenvalue "特征值求解器 1" | transform = eigenfrequency; shift = 1[GHz]
      d1: Direct "建议的直接求解器 (emw)" | linsolver = pardiso

Datasets
  dset1: Solution | solution = sol1

Plots
  pg1: PlotGroup2D "电场 (emw)" | data = dset1
    surf1: Surface "表面" | expr = emw.normE