// COMSOL Multiphysics 6.0.0.318 model "example.mph"
// Outline of the model tree

Parameters
  a = 1 [cm]
  r1 = 0.45 [cm]
  r2 = 0.30 [cm]
  kx = -pi/a

Geometry
  geom1 "几何 1" (2D, length unit m)
    r1: Rectangle "矩形 1" | base = center; size = {3*a, sqrt(3)*a}
    c1: Circle "圆 1" | pos = {-1*a, 0}; r = r2
    c2: Circle "圆 2" | pos = {1*a, 0}; r = r2
    c3: Circle "圆 3" | pos = {-0.5*a, sqrt(3)*a/2}; r = r1
    c4: Circle "圆 4" | pos = {0.5*a, sqrt(3)*a/2}; r = r1
    c5: Circle "圆 5" | pos = {0.5*a, -sqrt(3)*a/2}; r = r2
    c6: Circle "圆 6" | pos = {-0.5*a, -sqrt(3)*a/2}; r = r2
    copy1: Copy "副本 1" | input = r1; keep = on; displx = 0; disply = -sqrt(3)*a
    copy2: Copy "副本 2" | input = r1; keep = on; displx = 0; disply = sqrt(3)*a
    copy3: Copy "副本 3" | input = c1, c2, c5, c6; keep = on; displx = 0; disply = -sqrt(3)*a
    c7: Circle "圆 7" | pos = {-0.5*a, sqrt(3)*a/2+sqrt(3)*a}; r = r1
    c8: Circle "圆 8" | pos = {0.5*a, sqrt(3)*a/2+sqrt(3)*a}; r = r1
    c9: Circle "圆 9" | pos = {-1*a, sqrt(3)*a}; r = r1
    c10: Circle "圆 10" | pos = {a, sqrt(3)*a}; r = r1
    c11: Circle "圆 11" | pos = {-0.5*a, sqrt(3)*a/2}; r = r1
    c12: Circle "圆 12" | pos = {0.5*a, sqrt(3)*a/2}; r = r1
    c13: Circle "圆 13" | pos = {0.5*a, -sqrt(3)*a/2}; r = r2
    c14: Circle "圆 14" | pos = {-0.5*a, -sqrt(3)*a/2}; r = r2
    dif1: Difference "差集 1" | input = r1; input2 = c1, c11, c12, c13, c14, c2
    dif2: Difference "差集 2" | input = copy2; input2 = c10, c3, c4, c7, c8, c9
    dif3: Difference "差集 3" | input = copy1; input2 = c5, c6, copy3
    arr1: Array "阵列 1" | input = dif3; size = 2; type = linear; linearsize = 2; displ = {0, -sqrt(3)*a}
    arr2: Array "阵列 2" | input = dif2; size = 2; type = linear; linearsize = 2; displ = {0, sqrt(3)*a}
    pare1: PartitionEdges "分割边 1" | edge = arr2(1) boundaries 14; param = 0.25
    pare2: PartitionEdges "分割边 2" | edge = arr2(2) boundaries 14; param = 0.25
    pare3: PartitionEdges "分割边 3" | edge = arr1(1) boundaries 13; param = 0.25
    pare4: PartitionEdges "分割边 4" | edge = arr1(2) boundaries 13; param = 0.25
    fin: Finalize "形成联合体"

Physics
  acpr: PressureAcoustics "压力声学，频域" on all domains
    dependent variable p
    ShapeProperty.order_pressure = 1
    fpam1: FrequencyPressureAcousticsModel "压力声学 1" (default) | rho_mat = userdef; rho = 1.25; c_mat = userdef; c = 343
    shb1: SoundHard "硬声场边界（壁） 1" (default)
    init1: init "初始值 1" (default)
    pc1: PeriodicCondition "周期性条件 1" on boundaries 1, 3, 5, 7, 9, 24-28
      PeriodicType = Floquet
      kFloquet = {kx, 0, 0}
      destinationDomains: boundaries 24-28

Mesh
  mesh1 "网格 1"
    size: MeshSizeDefault "大小" | hmax = 0.0058; hmin = 2.6E-5; hcurve = 0.3; hgrad = 1.3
    edg4: Edge "边 0" on boundaries 7
      size1: Size "大小 1" on boundaries 7 | hmax = a/10; custom = on
    edg1: Edge "边 1" on boundaries 3, 5
      size1: Size "大小 1" on boundaries 1, 3, 5, 7, 9 | hmax = a/5; hauto = 2; custom = on
    cpe1: CopyEdge "复制边 01" | source = boundaries 3, 5, 7; destination = boundaries 25-27
    edg2: Edge "边 2" on boundaries 8, 15, 21
      size1: Size "大小 1" on boundaries 8, 10, 15, 16, 21, 22 | hmax = a/6; hauto = 2; custom = on
    cpe2: CopyEdge "复制边 2" | source = boundaries 8, 15, 21; destination = boundaries 10, 16, 22
    edg3: Edge "边 3" on boundaries 6, 14, 20
      size1: Size "大小 1" on boundaries 4, 6, 13, 14, 19, 20 | hmax = a/5; hauto = 3; custom = on
    cpe3: CopyEdge "复制边 3" | source = boundaries 6, 14, 20; destination = boundaries 4, 13, 19
    ftri1: FreeTri "自由三角形网格 1" on domains 2
      size1: Size "大小 1" on domains 2 | hauto = 7
    ftri2: FreeTri "自由三角形网格 2" on domains 4
      size1: Size "大小 1" on domains 4 | hauto = 7
    ftri3: FreeTri "自由三角形网格 3" on domains 3
      size1: Size "大小 1" on domains 3 | hauto = 7
    cpd1: CopyDomain "复制域 1" | source = domains 4; destination = domains 5
    cpd2: CopyDomain "复制域 2" | source = domains 2; destination = domains 1

Studies
  std1 "研究 1"
    eig: Eigenfrequency "特征频率" | shift = 100[Hz]

Solver configurations
  sol1 "解 1" (study std1)
    v1: Variables "因变量 1"
    e1: Eigenvalue "特征值求解器 1" | transform = eigenfrequency; shift = 100[Hz]; eigref = 100
      dDef: Direct "直接"

Datasets
  dset1: Solution | solution = sol1

Evaluation groups
  std1EvgFrq: EvaluationGroup "特征频率 (研究 1)" | data = dset1
    gev1: EvalGlobal "全局计算 1"
      expr = {freq*2*pi, imag(freq)/abs(freq), abs(freq)/imag(freq)/2}
      unit = {rad/s, 1, 1}
      descr = {角频率, 阻尼比, 品质因子}

Plots
  pg1: PlotGroup2D "声压 (acpr)" | data = dset1
    surf1: Surface "表面 1" | expr = acpr.p_t
  pg2: PlotGroup2D "声压级 (acpr)" | data = dset1
    surf1: Surface "表面 1" | expr = acpr.Lp